# Вариант 8, выполнилпа Васильева Арина,
# 1 курс, 8 группа
# Задание 7.1
# a) Нахождение значения выражения с 30-ю знаками после запятой помощью ключевого слова float
(4^sqrt(6.1) - tan(3.3))/(log(3.5, 4)*asin(0.25)) float, 31 → 133.6986944908422494651833839075
# b) Упрощение выражения с помощью  simplify
7/(x - 6)^2 - 4/(x - 4) simplify → 7/(x - 6)^2 - 4/(x - 4)
(-96 - 128*x - 30*x^2 + 3*x^3 + x^4)/(18 + 27*x + 10*x^2 + x^3) simplify → (x + 4)^2*(x - 6)/((x + 3)*(x + 6))
d^4*((10 - x - 2*x^2)^-4)/(d*x^4) simplify → d^3/(x^4*(2*x^2 + x - 10)^4)
d^2*(-2*cos(2*x)^2 - 2*cos(3*x)*sin(2*x) + 2*sin(3*x)^2)/(d*x^2) simplify → d*(2*sin(2*x)*(2*sin(3*x/2)^2 - 1) + 2*sin(2*x)^2 + 2*sin(3*x)^2 - 2)/x^2
# c) Раскрыть скобки используя ключевое слово expand
(2*x + 3*a)^4*(5*y - b)^3 expand → 1215*a^4*b^2*y - 81*a^4*b^3 - 6075*a^4*b*y^2 + 10125*a^4*y^3 - 216*a^3*b^3*x + 3240*a^3*b^2*x*y - 16200*a^3*b*x*y^2 + 27000*a^3*x*y^3 - 216*a^2*b^3*x^2 + 3240*a^2*b^2*x^2*y - 16200*a^2*b*x^2*y^2 + 27000*a^2*x^2*y^3 - 96*a*b^3*x^3 + 1440*a*b^2*x^3*y - 7200*a*b*x^3*y^2 + 12000*a*x^3*y^3 - 16*b^3*x^4 + 240*b^2*x^4*y - 1200*b*x^4*y^2 + 2000*x^4*y^3
# c) Преобразование тригонометрического выражения используя coeffs
-4 + cos(5*x) + cox(7*x) + sin(6*x) coeffs, x → [6*cos(x)^5*sin(x) + cos(x)^5 - 20*cos(x)^3*sin(x)^3 - 10*cos(x)^3*sin(x)^2 + 6*cos(x)*sin(x)^5 + 5*cos(x)*sin(x)^4 + cox(7*x) - 4]
# d) Разложения числа на простые числа и выражения на множители используя factor
136306 factor → 2*17*19*211
90 + 183*x + 58*x^2 + 5*x^3 factor → (x + 6)*(x + 5)*(5*x + 3)
# e) Представление в виде степенного многочлена относительно указанной переменной с помощью collect
(c - f)*(f - y)*(u - b)*(g - f) collect, f → (u - b)*f^3 + (b - u)*(c + g + y)*f^2 + (-(b - u)*(y*(c + g) + c*g))*f + c*g*y*(b - u)
# f) Нахождение производной и упрощение результата с помощью simplify
cos(x*cos(x^2))*(cos(x^2) - 2*x^2*sin(x^2)) simplify → cos(x*cos(x^2))*(cos(x^2) - 2*x^2*sin(x^2))
d/dx(sin(x*cos(x^2))) → cos(x*cos(x^2))*(cos(x^2) - 2*x^2*sin(x^2))
2*x*ln(tan(x^2/2 + π/4))*(tan(x^2/2 + π/4)^2 + 1)/tan(x^2/2 + π/4) simplify → 2*x*ln(tan(x^2/2 + π/4))*(tan(x^2/2 + π/4)^2 + 1)/tan(x^2/2 + π/4)
d/dx(ln(tan((π + 2*x^2)/4))^2) → 2*x*ln(tan(x^2/2 + π/4))*(tan(x^2/2 + π/4)^2 + 1)/tan(x^2/2 + π/4)
# g) Нахождение неопределенного интеграла и упрощение результата с помощью simplify
f(x) := cos(x)*cos(3*x)*cos(5*x)
integral(f(x), x) → sin(3*x)/12 + sin(7*x)/28 + sin(9*x)/36 + sin(x)/4
sin(3*x)/12 + sin(7*x)/28 + sin(9*x)/36 + sin(x)/4 simplify → sin(x)/2 - sin(x)^3/3 + sin(7*x)/28 + sin(9*x)/36
g(x) := 1/(x - 2 + nthroot(x, 3))
integral(g(x), x) → integral(1/(x + nthroot(x, 3) - 2), x)
integral(1/(x + nthroot(x, 3) - 2), x) simplify → integral(1/(x + nthroot(x, 3) - 2), x)
# h) Подставили функции, вычислили производную по а, производную результата по b, подставили значения a и b
y := cot(2*b)  # error: Эта переменная не определена.
x := cos(a)  # error: Эта переменная не определена.
d/dx(2*sqrt(x^2 + xy)/(3*x^2 + x*y^2 + y^2)) → 2*cos(a)/(sqrt(cos(a)^2 + xy)*(cot(2*b)^2*cos(a) + cot(2*b)^2 + 3*cos(a)^2)) - 2*(cot(2*b)^2 + 6*cos(a))*sqrt(cos(a)^2 + xy)/(cot(2*b)^2*cos(a) + cot(2*b)^2 + 3*cos(a)^2)^2
d/db(sqrt(sqrt(2) + 2)/(sqrt(xy + sqrt(2)/4 + 1/2)*(cot(2*b)^2*sqrt(sqrt(2) + 2)/2 + cot(2*b)^2 + 3*sqrt(2)/4 + 3/2)) - 2*(cot(2*b)^2 + 3*sqrt(sqrt(2) + 2))*sqrt(xy + sqrt(2)/4 + 1/2)/(cot(2*b)^2*sqrt(sqrt(2) + 2)/2 + cot(2*b)^2 + 3*sqrt(2)/4 + 3/2)^2) → 4*cot(2*b)*(2*cot(2*b)^2 + 2)*sqrt(xy + sqrt(2)/4 + 1/2)/(cot(2*b)^2*sqrt(sqrt(2) + 2)/2 + cot(2*b)^2 + 3*sqrt(2)/4 + 3/2)^2 - 2*(2*cot(2*b)*(2*cot(2*b)^2 + 2) + cot(2*b)*sqrt(sqrt(2) + 2)*(2*cot(2*b)^2 + 2))*(2*cot(2*b)^2 + 6*sqrt(sqrt(2) + 2))*sqrt(xy + sqrt(2)/4 + 1/2)/(cot(2*b)^2*sqrt(sqrt(2) + 2)/2 + cot(2*b)^2 + 3*sqrt(2)/4 + 3/2)^3 + (2*cot(2*b)*(2*cot(2*b)^2 + 2) + cot(2*b)*sqrt(sqrt(2) + 2)*(2*cot(2*b)^2 + 2))*sqrt(sqrt(2) + 2)/(sqrt(xy + sqrt(2)/4 + 1/2)*(cot(2*b)^2*sqrt(sqrt(2) + 2)/2 + cot(2*b)^2 + 3*sqrt(2)/4 + 3/2)^2)
a := π/8
b := 3*π/8
4*cot(2*b)*(2*cot(2*b)^2 + 2)*sqrt(xy + sqrt(2)/4 + 1/2)/(cot(2*b)^2*sqrt(sqrt(2) + 2)/2 + cot(2*b)^2 + 3*sqrt(2)/4 + 3/2)^2 - 2*(2*cot(2*b)*(2*cot(2*b)^2 + 2) + cot(2*b)*sqrt(sqrt(2) + 2)*(2*cot(2*b)^2 + 2))*(2*cot(2*b)^2 + 6*sqrt(sqrt(2) + 2))*sqrt(xy + sqrt(2)/4 + 1/2)/(cot(2*b)^2*sqrt(sqrt(2) + 2)/2 + cot(2*b)^2 + 3*sqrt(2)/4 + 3/2)^3 + (2*cot(2*b)*(2*cot(2*b)^2 + 2) + cot(2*b)*sqrt(sqrt(2) + 2)*(2*cot(2*b)^2 + 2))*sqrt(sqrt(2) + 2)/(sqrt(xy + sqrt(2)/4 + 1/2)*(cot(2*b)^2*sqrt(sqrt(2) + 2)/2 + cot(2*b)^2 + 3*sqrt(2)/4 + 3/2)^2) float, 20 → 3.6709420645135860619*sqrt(xy + 0.8535533905932737622) - 1.4140913186183554665/sqrt(xy + 0.8535533905932737622)
# i) Решить уравнение третьей степени при помощи root
b(x) := 9*x^3 - 4*x^2 - 3*x - 2
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a_1 := -0.1
z_1 == real
a_2 := 7
z_2 == real
z_1 := root(b(a_1), a_1)
z_1 = 1
z_2 := root(b(a_2), a_2)
z_2 = 1
b(z_1) = -1.05759e-9
b(z_2) = 1.43039e-10
# z.1 и z.2 - корни уравнения
# j) Найти неопределенный интеграл посредством разложения в ряд самой функции
f1(x) := cos(sqrt(x))
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f1(x) series → cos(1) + a^2*sin(1)/4 - a^4*(cos(1)/32 - sin(1)/96)
# k) Нахождение определителя и обратной матрицы
B := [2, 9, 11; 10, 14, 10; 4, 1, 5]
B^-1 = [-0.12605, 0.0714286, 0.134454; 0.0210084, 0.0714286, -0.189076; 0.0966387, -0.0714286, 0.130252]
|B| = -476
# Задание 7.2
# Рассчитаем выражение и представим ответ с 40 знаками после точки
(4^sqrt(6.1) - tan(3.3))/(log(3.5, 4)*asin(0.25)) float, 40 → 133.6986944908422494651833839075108455429
# Найдем определнный интеграл на промежутке [2;4]
f1(x) := cos(sqrt(x))
integral(cos(1) + a^2*sin(1)/4 - a^4*(cos(1)/32 - sin(1)/96), x = 2 .. 4) → 2*cos(1) - π^4*cos(1)/65536 + π^2*sin(1)/128 + π^4*sin(1)/196608 = 1.1451
# Задание 7.3 Построение 3 графиков функции
f_1(x) := -e^(2*x)/33
f_2(x) := x*cos(2*x)
f_3(x) := cos(x)*sin(x)^2
x := -2, -1.9 .. 2
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# Задание 7.4 Построение параметрически заданной функции
x(t) := 2*cos(4*t)*sin(2*t)
t := 0, 0.1 .. π
y(t) := 4*cos(2*t)*sin(t)
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# Задание 7.5 Построим график в полярной системе координат
φ_1(t) := sin(t/4)
t := 0 .. 2*π
φ_2(t) := ln(t + 1)
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# Задание 7.6 Построим трёхмерный график
f_6(x, y) := exp(sqrt(x^2 + y^2))
# [component: inputs f_6]
