# Васильева Арина, 1 курс, 8 группа.
# Вариант 8
# Задание 7.7
f(x) := exp(x) + sqrt(x)
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Given
f(x) == 0
Find(x) =  # error: Эта переменная не определена.
# График F(x) не имеет точек пересечения с осью Ox.
# Задание 7.7 Вариант 2
f(x) := cos(2*x) - sqrt(x)
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x := 5
Given
f(x) == 0
Find(x) = 0.428548
